;; 1. Based on: run106
;; 2. Description: A SIMPLE PHARMACODYNAMIC MODEL SD=7
;; x1. Author: user

$PROBLEM A SIMPLE PHARMACODYNAMIC MODEL
$INPUT   ID TIME CP DV
$DATA    PD_8_3.csv IGNORE=@
$PRED
EMAX=THETA(1)+ETA(1)
C50=THETA(2)+ETA(2)
E=EMAX*CP/(C50+CP)
Y=E+ERR(1)
$THETA   100   20
$OMEGA   1   1
$SIGMA   5
$SIM (12345) (54321) ONLYSIM
; $ESTIMATION METHOD=1 INTER MAXEVALS=999
;
