Sat Dec 28 18:51:09 CST 2013
;; 1. Based on:
;; 2. Description: PK model
;; 3. Label:
;; x1. Author: user
$PROBLEM    REPLICATE OF ADVAN2 USING DIFF EQUATIONS-- POPULATION DATA
$INPUT      ID TIME CP=DV DOSE=AMT
$DATA       test_data.txt
$SUBROUTINE ADVAN6 TOL=7 ;TOL - THE NUMBER OF ACCURATE DIGITS
$MODEL      COMP=(DEPOT,DEFDOSE) COMP=(CENTRAL,DEFOBS,NOOFF)
$PK
 ;THETA(1)=MEAN ELIMINATION RATE CONSTANT K (1/HR) = 0.076
 ;THETA(2)=VOLUME OF DISTRIBUTION                  = 0.481
 ;THETA(3)=MEAN ABSORPTION RATE CONSTANT KA (1/HR) = 2.790
    CALLFL=1
    K= THETA(1)+ETA(1)
    V= THETA(2)+ETA(2)
    KA=THETA(3)+ETA(3)   ;ETA(1) - INTERINDIVIDUAL VARIABILITY OF KA (NU)
    ;CL=K*V
$DES
    DADT(1)=-KA*A(1)
    DADT(2)= KA/V*A(1)-K*A(2)    ;A(2) = CP
$ERROR
    Y=F+EPS(1)

$THETA  (.001,.1,5)
 (.001,.5,20)
 (.001,3,10)
$OMEGA  BLOCK(3)
 .1
 .0001 .01
 .0001 .0001 .1  ; VARIANCE OF ETA
$SIGMA  .3  ; VARIANCE OF EPS
$ESTIMATION MAXEVAL=450 PRINT=5
 ;COVARIANCE STEP IS IMPLEMENTED
$COVARIANCE
$TABLE      ID TIME DOSE PRED ETA1 ETA2 ETA3 FILE=tab001 NOPRINT
$TABLE      ID TIME DV PRED FILE=tab1 NOPRINT ONEHEADER
$SCATTER    (DV PRED) VS TIME BY ID

NM-TRAN MESSAGES
 WARNINGS AND ERRORS (IF ANY) FOR PROBLEM    1
 (WARNING  2) NM-TRAN INFERS THAT THE DATA ARE POPULATION.

1NONLINEAR MIXED EFFECTS MODEL PROGRAM (NONMEM) VERSION 7.2.0
 ORIGINALLY DEVELOPED BY STUART BEAL, LEWIS SHEINER, AND ALISON BOECKMANN
 CURRENT DEVELOPERS ARE ROBERT BAUER, ICON DEVELOPMENT SOLUTIONS,
 AND ALISON BOECKMANN. IMPLEMENTATION, EFFICIENCY, AND STANDARDIZATION
 PERFORMED BY NOUS INFOSYSTEMS.
 PROBLEM NO.:         1
 REPLICATE OF ADVAN2 USING DIFF EQUATIONS-- POPULATION DATA
 TOT. NO. OF OBS RECS:      132
 TOT. NO. OF INDIVIDUALS:     12
 GENERAL NONLINEAR KINETICS MODEL (ADVAN6)
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 #TBLN:      1
 #METH: First Order
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
 #TERM:
0MINIMIZATION SUCCESSFUL
 NO. OF FUNCTION EVALUATIONS USED:      377
 NO. OF SIG. DIGITS IN FINAL EST.:  3.5

 #TERE:
 Elapsed estimation time in seconds:     2.35
 Elapsed covariance time in seconds:     0.57

 ********************                                   FIRST ORDER                                  ********************
 #OBJT:**************                       MINIMUM VALUE OF OBJECTIVE FUNCTION                      ********************
 #OBJV:********************************************      101.072       **************************************************

 ********************                                   FIRST ORDER                                  ********************
 ********************                             FINAL PARAMETER ESTIMATE                           ********************

 THETA - VECTOR OF FIXED EFFECTS PARAMETERS   *********
         TH 1      TH 2      TH 3
         8.09E-02  4.81E-01  2.82E+00

 OMEGA - COV MATRIX FOR RANDOM EFFECTS - ETAS  ********
            ETA1      ETA2      ETA3
 ETA1
+        3.29E-04
 ETA2
+        2.02E-04  4.93E-03
 ETA3
+        1.09E-02 -3.73E-02  6.21E+00

 SIGMA - COV MATRIX FOR RANDOM EFFECTS - EPSILONS  ****
            EPS1
 EPS1
+        3.82E-01

 OMEGA - CORR MATRIX FOR RANDOM EFFECTS - ETAS  *******
            ETA1      ETA2      ETA3
 ETA1
+        1.81E-02
 ETA2
+        1.59E-01  7.02E-02
 ETA3
+        2.42E-01 -2.13E-01  2.49E+00

 SIGMA - CORR MATRIX FOR RANDOM EFFECTS - EPSILONS  ***
            EPS1
 EPS1
+        6.18E-01

 ********************                                   FIRST ORDER                                  ********************
 ********************                            STANDARD ERROR OF ESTIMATE                          ********************

 THETA - VECTOR OF FIXED EFFECTS PARAMETERS   *********
         TH 1      TH 2      TH 3
         9.21E-03  2.32E-02  7.06E-01

 OMEGA - COV MATRIX FOR RANDOM EFFECTS - ETAS  ********
            ETA1      ETA2      ETA3
 ETA1
+        2.69E-04
 ETA2
+        5.79E-04  1.87E-03
 ETA3
+        2.49E-02  6.35E-02  5.30E+00

 SIGMA - COV MATRIX FOR RANDOM EFFECTS - EPSILONS  ****
            EPS1
 EPS1
+        9.94E-02

 OMEGA - CORR MATRIX FOR RANDOM EFFECTS - ETAS  *******
            ETA1      ETA2      ETA3
 ETA1
+        7.42E-03
 ETA2
+        4.71E-01  1.33E-02
 ETA3
+        4.24E-01  3.50E-01  1.06E+00

 SIGMA - CORR MATRIX FOR RANDOM EFFECTS - EPSILONS  ***
            EPS1
 EPS1
+        8.04E-02

 ********************                                   FIRST ORDER                                  ********************
 ********************                          COVARIANCE MATRIX OF ESTIMATE                         ********************

            TH 1      TH 2      TH 3      OM11      OM12      OM13      OM22      OM23      OM33      SG11
 TH 1
+        8.48E-05
 TH 2
+        7.94E-05  5.38E-04
 TH 3
+        2.16E-03 -3.63E-03  4.98E-01
 OM11
+        1.88E-06  1.05E-06  4.42E-05  7.23E-08
 OM12
+       -3.48E-06  1.93E-06 -4.05E-05 -6.43E-08  3.35E-07
 OM13
+        1.91E-04  1.11E-04  9.50E-03  6.03E-06 -5.72E-06  6.20E-04
 OM22
+       -1.71E-06  1.41E-05  3.13E-04  9.91E-08  6.13E-07  1.35E-05  3.48E-06
 OM23
+       -3.37E-05  8.97E-04 -1.83E-02 -1.33E-07  2.13E-05 -1.17E-04  3.41E-05  4.03E-03
 OM33
+        1.16E-02 -2.93E-02  3.63E+00  1.71E-04 -2.94E-04  5.59E-02  2.01E-03 -1.45E-01  2.81E+01
 SG11
+        3.54E-04 -6.25E-04 -7.53E-03  1.48E-05 -2.67E-05  1.07E-03 -3.23E-05 -1.56E-03 -1.14E-01  9.89E-03

 ********************                                   FIRST ORDER                                  ********************
 ********************                          CORRELATION MATRIX OF ESTIMATE                        ********************

            TH 1      TH 2      TH 3      OM11      OM12      OM13      OM22      OM23      OM33      SG11
 TH 1
+        9.21E-03
 TH 2
+        3.72E-01  2.32E-02
 TH 3
+        3.32E-01 -2.22E-01  7.06E-01
 OM11
+        7.58E-01  1.68E-01  2.33E-01  2.69E-04
 OM12
+       -6.54E-01  1.44E-01 -9.92E-02 -4.13E-01  5.79E-04
 OM13
+        8.34E-01  1.92E-01  5.40E-01  9.01E-01 -3.97E-01  2.49E-02
 OM22
+       -9.97E-02  3.25E-01  2.38E-01  1.97E-01  5.68E-01  2.91E-01  1.87E-03
 OM23
+       -5.76E-02  6.09E-01 -4.08E-01 -7.77E-03  5.79E-01 -7.40E-02  2.88E-01  6.35E-02
 OM33
+        2.37E-01 -2.39E-01  9.71E-01  1.20E-01 -9.58E-02  4.24E-01  2.04E-01 -4.32E-01  5.30E+00
 SG11
+        3.86E-01 -2.71E-01 -1.07E-01  5.55E-01 -4.64E-01  4.30E-01 -1.74E-01 -2.48E-01 -2.17E-01  9.94E-02
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