Sat Dec 28 18:56:28 CST 2013
;; 1. Based on:
;; 2. Description: PK model
;; 3. Label:
;; x1. Author: user
$PROBLEM    FIRST ADVAN2 -- POPULATION DATA
$INPUT      ID TIME CP=DV DOSE=AMT MDV
$DATA       test_data.txt
$SUBROUTINE ADVAN2
$PK
 ;THETA(1)=MEAN ELIMINATION RATE CONSTANT K (1/HR)
 ;THETA(2)=VOLUME OF DISTRIBUTION
 ;THETA(3)=MEAN ABSORPTION RATE CONSTANT KA (1/HR)
    CALLFL=1
    K=THETA(1)+ETA(1)
    KA=THETA(2)+ETA(2)   ;ETA(1) - INTERINDIVIDUAL VARIABILITY OF KA (NU)
    S2= THETA(3)+ETA(3)
    ;CL=K*V;


$ERROR
    Y=F+EPS(1)

$THETA  (.001,.7,5)
 (.001,1,10)
 (.001,0.3,20)
$OMEGA  BLOCK(3)
 .1
 .0001 .01
 .0001 .0001 .1  ; VARIANCE OF ETA
$SIGMA  .3  ; VARIANCE OF EPS
$ESTIMATION MAXEVAl=450 NOABORT PRINT=5 SIG=7
;$SIM (123)
 ;COVARIANCE STEP IS IMPLEMENTED
$COVARIANCE
$TABLE      ID TIME DOSE PRED DV FILE=tab002 NOPRINT
$TABLE      ID TIME DV FILE=tab2 NOPRINT ONEHEADER
$SCATTER    (DV PRED) VS TIME BY ID

NM-TRAN MESSAGES
 WARNINGS AND ERRORS (IF ANY) FOR PROBLEM    1
 (WARNING  2) NM-TRAN INFERS THAT THE DATA ARE POPULATION.

1NONLINEAR MIXED EFFECTS MODEL PROGRAM (NONMEM) VERSION 7.2.0
 ORIGINALLY DEVELOPED BY STUART BEAL, LEWIS SHEINER, AND ALISON BOECKMANN
 CURRENT DEVELOPERS ARE ROBERT BAUER, ICON DEVELOPMENT SOLUTIONS,
 AND ALISON BOECKMANN. IMPLEMENTATION, EFFICIENCY, AND STANDARDIZATION
 PERFORMED BY NOUS INFOSYSTEMS.
 PROBLEM NO.:         1
 FIRST ADVAN2 -- POPULATION DATA
 TOT. NO. OF OBS RECS:      132
 TOT. NO. OF INDIVIDUALS:     12
 ONE COMPARTMENT MODEL WITH FIRST-ORDER ABSORPTION (ADVAN2)
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 #TBLN:      1
 #METH: First Order
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
 #TERM:
0MINIMIZATION TERMINATED
 DUE TO MAX. NO. OF FUNCTION EVALUATIONS EXCEEDED
 NO. OF FUNCTION EVALUATIONS USED:      452
 NO. OF SIG. DIGITS UNREPORTABLE

 #TERE:
 Elapsed estimation time in seconds:     0.14

 ********************                                   FIRST ORDER                                  ********************
 #OBJT:**************                       MINIMUM VALUE OF OBJECTIVE FUNCTION                      ********************
 #OBJV:********************************************      101.072       **************************************************

 ********************                                   FIRST ORDER                                  ********************
 ********************                             FINAL PARAMETER ESTIMATE                           ********************

 THETA - VECTOR OF FIXED EFFECTS PARAMETERS   *********
         TH 1      TH 2      TH 3
         8.09E-02  2.82E+00  4.81E-01

 OMEGA - COV MATRIX FOR RANDOM EFFECTS - ETAS  ********
            ETA1      ETA2      ETA3
 ETA1
+        3.29E-04
 ETA2
+        1.09E-02  6.22E+00
 ETA3
+        2.02E-04 -3.73E-02  4.93E-03

 SIGMA - COV MATRIX FOR RANDOM EFFECTS - EPSILONS  ****
            EPS1
 EPS1
+        3.82E-01

 OMEGA - CORR MATRIX FOR RANDOM EFFECTS - ETAS  *******
            ETA1      ETA2      ETA3
 ETA1
+        1.81E-02
 ETA2
+        2.42E-01  2.49E+00
 ETA3
+        1.59E-01 -2.13E-01  7.02E-02

 SIGMA - CORR MATRIX FOR RANDOM EFFECTS - EPSILONS  ***
            EPS1
 EPS1
+        6.18E-01
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